OpenVSP model (file version 5), 9 components.
Geometry view with OpenVSP parameter names; values to 6 digits, angles in degrees, lengths in the model's unit.
Overall bounding box: X_Min=-19.7288 X_Len=38.7661 Y_Min=-25.398 Y_Len=50.796 Z_Min=-1.75366 Z_Len=11.0645

Fuselage "Fuselage"
  location (X Y Z) -17.8804 0 0.76087, rotation 0 0 0
  bounding box size 36.0387 5.45859 5.89353
  mass: Density=0 Shell_Flag=1 Mass_Area=2 Mass_Prior=0
  Design: Length=36
  cross sections:
    n   XLocPercent  YLocPercent  YRotate  ZLocPercent  shape
    0   0            0            0        0            circle Circle_Diameter=1.84181
    1   0.022973     0            0        0            circle Circle_Diameter=2
    2   0.198499     0            0        -0.003       ellipse Ellipse_Height=4.1 Ellipse_Width=4.1574
    3   0.256581     0            0        -0.003       ellipse Ellipse_Height=4.42054 Ellipse_Width=4.83873
    4   0.283778     0            0        0.01         ellipse Ellipse_Height=5.3 Ellipse_Width=5
    5   0.321865     0            0        0.015        ellipse Ellipse_Height=5.65 Ellipse_Width=5.2
    6   0.381243     0            0        0.014        ellipse Ellipse_Height=5.75 Ellipse_Width=5.25838
    7   0.569564     0            2        0.004        ellipse Ellipse_Height=5.2 Ellipse_Width=5.25838
    8   0.727413     0            2        0.005        ellipse Ellipse_Height=3.85 Ellipse_Width=3.6
    9   0.99         0            0        0.01         ellipse Ellipse_Height=1.8 Ellipse_Width=1.41677
    10  1            0            0        0.01         point

Wing "Wing", child of "Fuselage"
  location (X Y Z) -6.43697 0 3.24901, rotation 0 0 0; relative location 11.4435 0 2.48814, rotation 0 0 0
  symmetric about XZ
  bounding box size 6.23525 50.796 1.12902
  mass: Density=0 Shell_Flag=1 Mass_Area=2 Mass_Prior=0
  totals: TotalSpan=49.88 TotalProjectedSpan=49.88 TotalChord=6.21492 TotalArea=310 TotalAR=8.02585
  root: chord 6.21492, twist 2, NACA 5-digit CamberLoc=0.227435 IdealCl=0.832765 ThickChord=0.140909
  sections:
    n  Span   Root_Chord  Tip_Chord  Area  Sweep  Sweep_Location  Dihedral  Twist  Twist_Location  tip airfoil
    1  24.94  6.21492     6.21492    155   0      0               0         0      0.25            NACA 5-digit CamberLoc=0.224538 IdealCl=0.866894 ThickChord=0.140411
  SS_Control "Flaps": UStart=0.368182 UEnd=0.5175 Length_C_Start=0.25 Length_C_End=0.25 Length_Start=1.5537 Length_End=1.5535 LE_Flag=0 Surf_Type=2
  SS_Control "Ailerons": UStart=0.5175 UEnd=0.6666 Length_C_Start=0.25 Length_C_End=0.25 Length_Start=1.5535 Length_End=1.55373 LE_Flag=0 Surf_Type=2

Wing "Hstab", child of "Fuselage"
  location (X Y Z) 14.8538 0 2.01087, rotation 0 2 0; relative location 32.7342 0 1.25, rotation 0 2 0
  symmetric about XZ
  bounding box size 4.18359 16.8 0.510869
  mass: Density=0 Shell_Flag=1 Mass_Area=1 Mass_Prior=0
  totals: TotalSpan=16.8 TotalProjectedSpan=16.8 TotalChord=4.17701 TotalArea=70.1737 TotalAR=4.02202
  root: chord 4.18605, twist 0, NACA 4-series Camber=0 CamberLoc=0.2 ThickChord=0.119291
  sections:
    n  Span  Root_Chord  Tip_Chord  Area     Sweep  Sweep_Location  Dihedral  Twist  Twist_Location  tip airfoil
    1  8.4   4.18605     4.16797    35.0869  0      0               0         0      0.25            NACA 4-series Camber=0 CamberLoc=0.2 ThickChord=0.1
  SS_Control "Elevator": UStart=0.3333 UEnd=0.6666 Length_C_Start=0.454545 Length_C_End=0.454545 Length_Start=1.90275 Length_End=1.89453 LE_Flag=0 Surf_Type=2

Wing "LeftHstabVstab", child of "Hstab"
  location (X Y Z) 14.3693 -7.946 2.02779, rotation 0 2 0; relative location -0.484761 -7.946 0, rotation 0 0 0
  bounding box size 3.22017 0.2 1.31464
  totals: TotalSpan=0.2 TotalProjectedSpan=0.2 TotalChord=3.2 TotalArea=0.64 TotalAR=0.0625
  root: chord 3.2, twist 0, NACA 4-series Camber=0 CamberLoc=0.9 ThickChord=0.22
  sections:
    n  Span  Root_Chord  Tip_Chord  Area  Sweep  Sweep_Location  Dihedral  Twist  Twist_Location  tip airfoil
    1  0.2   3.2         3.2        0.64  0      0               0         0      0.25            NACA 4-series Camber=0 CamberLoc=0.2 ThickChord=0.22

Wing "RightHstabVstab", child of "Hstab"
  location (X Y Z) 14.3693 7.946 2.02779, rotation 0 2 0; relative location -0.484761 7.946 0, rotation 0 0 0
  bounding box size 3.22017 0.2 1.31464
  totals: TotalSpan=0.2 TotalProjectedSpan=0.2 TotalChord=3.2 TotalArea=0.64 TotalAR=0.0625
  root: chord 3.2, twist 0, NACA 4-series Camber=0 CamberLoc=0.9 ThickChord=0.22
  sections:
    n  Span  Root_Chord  Tip_Chord  Area  Sweep  Sweep_Location  Dihedral  Twist  Twist_Location  tip airfoil
    1  0.2   3.2         3.2        0.64  0      0               0         0      0.25            NACA 4-series Camber=0 CamberLoc=0.2 ThickChord=0.22

Blank "PropellerWeight", child of "Fuselage"
  location (X Y Z) -18.5288 0 0.779014, rotation 0 0 0; relative location -0.64837 0 0.0181441, rotation 0 0 0
  Mass: Point_Mass=135 Point_Mass_Flag=1

Blank "EngineWeight", child of "Fuselage"
  location (X Y Z) -13.0288 0 0.629014, rotation 0 0 0; relative location 4.85163 0 -0.131856, rotation 0 0 0
  Mass: Point_Mass=289 Point_Mass_Flag=1

Wing "DorsalFin", child of "Fuselage"
  location (X Y Z) 5.61957 0 2.16087, rotation 90 0 0; relative location 23.5 0 1.4, rotation 90 0 0
  bounding box size 11.703 0.936345 7.15
  mass: Density=0 Shell_Flag=1 Mass_Area=1 Mass_Prior=0
  totals: TotalSpan=7.15 TotalProjectedSpan=7.15 TotalChord=8.61875 TotalArea=43.91 TotalAR=1.16426
  root: chord 9.3, twist 0, NACA 4-series Camber=0 CamberLoc=0.2 ThickChord=0.08
  sections:
    n  Span  Root_Chord  Tip_Chord  Area   Sweep  Sweep_Location  Dihedral  Twist  Twist_Location  tip airfoil
    1  0.5   9.3         11.7       5.25   0      0               0         0      0.25            as above
    2  0.5   11.7        11.7       5.85   0      0               0         0      0.25            as above
    3  1.75  11.7        4.3        14     76.7   0               0         0      0.25            NACA 4-series Camber=0 CamberLoc=0.2 ThickChord=0.15
    4  4.4   4.3         4.25       18.81  0      0               0         0      0.25            as above
  SS_Control "BottomRudder": UStart=0.205 UEnd=0.33333 Length_C_Start=0 Length_C_End=0.162394 Length_Start=0 Length_End=1.9 LE_Flag=0 Surf_Type=2
  SS_Control "LowerRudder": UStart=0.3333 UEnd=0.5 Length_C_Start=0.1624 Length_C_End=0.162393 Length_Start=1.9 Length_End=1.9 LE_Flag=0 Surf_Type=2
  SS_Control "UpperRudder": UStart=0.5 UEnd=0.6666 Length_C_Start=0.162393 Length_C_End=0.441557 Length_Start=1.9 Length_End=1.9 LE_Flag=0 Surf_Type=2
  SS_Control "TopRudder": UStart=0.6666 UEnd=0.8333 Length_C_Start=0.441557 Length_C_End=0.447058 Length_Start=1.9 Length_End=1.9 LE_Flag=0 Surf_Type=2

Fuselage "Spinner", child of "Fuselage"
  location (X Y Z) -19.7288 0 0.76087, rotation 0 0 0; relative location -1.84837 0 0, rotation 0 0 0
  bounding box size 1.75 1.76733 1.76733
  mass: Density=0 Shell_Flag=1 Mass_Area=0 Mass_Prior=0
  Design: Length=1.75
  cross sections:
    n  XLocPercent  YLocPercent  ZLocPercent  shape
    0  0            0            0            point
    1  1            0            0            circle Circle_Diameter=1.76733

VSPAERO settings: Sref=310 bref=49.88 cref=6.21492 Xcg=-2.86487 Ycg=-4.31455e-05 Zcg=2.22933 AlphaStart=-15 AlphaEnd=25 AlphaNpts=9 BetaStart=-30 BetaEnd=30 BetaNpts=5 MachStart=0.2 MachEnd=0 MachNpts=1 ReCref=1e+07 Vinf=163 Rho=0.002377
  control group "Flaps": DeflectionAngle=0
  control group "Ailerons": DeflectionAngle=0
  control group "Elevator": DeflectionAngle=0
  control group "Rudder": DeflectionAngle=0
